units metal
atom_style atomic
boundary p  p  p

read_data config.struct

pair_style ?pair_style?
pair_coeff * * ?potential? ?element?

neighbor ?skin? bin
neigh_modify every 1 delay 0 check yes

# -------- Energy minimize -------- #

thermo_style custom step pe press vol
thermo 1

fix 1 all box/relax iso 0.0
min_style cg
minimize ?etol? ?ftol? ?maxiter? ?maxeval?

unfix 1

# ---------- Equilibrate ---------- #

write_dump all custom init.dump id type x y z
write_dump all custom diffusion.dump id type x y z
write_dump all custom quench.dump id type x y z

neigh_modify delay 10

timestep ?timestep?
velocity all create ?temp? ?vel_seed? mom yes

fix equil all npt temp ?temp? ?temp? ?Tdamp? iso 0.0 0.0 ?Pdamp?
fix mom all momentum 1000 linear 1 1 1

thermo_style custom step etotal temp press vol
thermo 100

run ?equil?

unfix equil

# ----------- Diffusion ----------- #

fix nve all nve
fix lang all langevin ?temp? ?temp? ?Tdamp? ?lang_seed?

reset_timestep 0

include msd.in

dump 1 all custom ?snapshot? diffusion.dump id type x y z
dump_modify 1 append yes

run ?diffusion?

# ------------- Quench ------------ #

unfix 1
unfix 2
unfix 3
undump 1

log quench.log
thermo_style custom step pe
thermo 1

neigh_modify delay 0 check yes

label loop

variable tstep_idx loop ?num_snapshots?
variable tstep equal ${tstep_idx}*?snapshot?

print "Timestep idx: ${tstep_idx}"
print "Timestep: ${tstep}"

read_dump diffusion.dump ${tstep} x y z replace yes

reset_timestep 0

minimize ?etol? ?ftol? ?maxiter? ?maxeval?

reset_timestep ${tstep}
write_dump all custom quench.dump id type x y z modify append yes

next tstep_idx

jump SELF loop
